OpenVSP model (file version 4), 16 components.
Geometry view with OpenVSP parameter names; values to 6 digits, angles in degrees, lengths in the model's unit.
Overall bounding box: X_Min=-1.30435 X_Len=26.7495 Y_Min=-17.9249 Y_Len=35.8498 Z_Min=-3.78098 Z_Len=10.3371

Blank "337-Parent"
  location (X Y Z) 0 0 0, rotation 0 0 0

Blank "Wing-Parent", child of "337-Parent"
  location (X Y Z) 6.51067 0 1.8428, rotation 0 0 0

Wing "MainWing", child of "Wing-Parent"
  location (X Y Z) 4.44545 0 2.49497, rotation 0 0 0; relative location -2.06522 0 0.652174, rotation 0 0 0
  symmetric about XZ
  bounding box size 5.33157 35.8498 1.0459
  totals: TotalSpan=35.8567 TotalProjectedSpan=35.8403 TotalChord=4.89573 TotalArea=174.44 TotalAR=7.36369 RelativeTwistFlag=1
  root: chord 5.3333, twist 1.5, airfoil file "NACA 2412"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 ThickChord=0.116667
  sections:
    n  Span     Root_Chord  Tip_Chord  Area     Sweep  Sweep_Location  Dihedral  Twist   Twist_Location  tip airfoil
    1  8.33333  5.3333      5.3333     44.4441  0      0               1.7333    3       0.3             airfoil file "NACA 2412"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 ThickChord=0.1
    2  9.595    5.3333      3.583      42.7759  2.15   0               1.733     -1.425  0.3             as above
  SS_Control "SS_CONT_0": UStart=0 UEnd=0.5 Length_C_Start=0.300008 Length_C_End=0.300008 Length_Start=1.6 Length_End=1.6 LE_Flag=0 Surf_Type=2
  SS_Control "SS_CONT_1": UStart=0.5 UEnd=1 Length_C_Start=0.25 Length_C_End=0.25 Length_Start=1.3333 Length_End=0.895731 LE_Flag=0 Surf_Type=2

Blank "Stab-Parent", child of "337-Parent"
  location (X Y Z) 19.7577 0 1.6511, rotation 0 -2 0

Wing "Stab", child of "Stab-Parent"
  location (X Y Z) 19.5404 0 1.64351, rotation 0 -2 0; relative location -0.217391 0 0, rotation 0 0 0
  symmetric about XZ
  bounding box size 4.17187 11.54 0.484232
  totals: TotalSpan=11.54 TotalProjectedSpan=11.54 TotalChord=3.3544 TotalArea=38.7098 TotalAR=3.44026
  root: chord 4.18764, twist -3, NACA 4-series Camber=0 CamberLoc=0.2 ThickChord=0.09
  sections:
    n  Span  Root_Chord  Tip_Chord  Area     Sweep    Sweep_Location  Dihedral  Twist  Twist_Location  tip airfoil
    1  5.77  4.18764     2.52116    19.3549  8.00905  0               0         0      0.25            NACA 4-series Camber=0 CamberLoc=0.2 ThickChord=0.08
  SS_Control "SS_CONT_0": UStart=0 UEnd=1 Length_C_Start=0.544208 Length_C_End=0.544208 Length_Start=2.27895 Length_End=1.37203 LE_Flag=0 Surf_Type=2

Blank "Verts-Parent", child of "337-Parent"
  location (X Y Z) 18.8295 0 1.4581, rotation 0 0 0

Wing "Verts-Full", child of "Verts-Parent"
  location (X Y Z) 14.413 0 1.72972, rotation 90 0 0; relative location -4.41652 0 0.271617, rotation 90 0 0
  bounding box size 11.0322 0.817289 4.82641
  totals: TotalSpan=4.82641 TotalProjectedSpan=4.82641 TotalChord=4.92122 TotalArea=19.2768 TotalAR=1.20841
  root: chord 9.07751, twist 0, NACA 4-series Camber=0 CamberLoc=0.2 ThickChord=0.09
  sections:
    n  Span     Root_Chord  Tip_Chord  Area     Sweep    Sweep_Location  Dihedral  Twist  Twist_Location  tip airfoil
    1  1.12242  9.07751     4.23181    7.46934  46.7195  0.822727        0         0      0.25            as above
    2  3.70399  4.23181     2.14375    11.8075  45.0452  0               0         0      0.25            NACA 4-series Camber=0 CamberLoc=0.2 ThickChord=0.08
  SS_Control "SS_CONT_0": UStart=0 UEnd=1 Length_C_Start=0.268686 Length_C_End=0.5011 Length_Start=2.439 Length_End=1.07423 LE_Flag=0 Surf_Type=2

Blank "Struts-Parent", child of "337-Parent"
  location (X Y Z) 10.3785 0 -1.5, rotation 0 0 0

Wing "Struts", child of "Struts-Parent"
  location (X Y Z) 4.94372 1.42391 -1.33549, rotation 43.1087 0.108696 -4.56522; relative location -5.43478 1.42391 0.164512, rotation 43.1087 0.108696 -4.56522
  symmetric about XZ
  bounding box size 1.04546 17.0696 3.97686
  totals: TotalSpan=16.1667 TotalProjectedSpan=15.6624 TotalChord=0.4273 TotalArea=6.90802 TotalAR=35.5111
  root: chord 0.4273, twist 0, NACA 4-series Camber=0 CamberLoc=0.2 ThickChord=0.333
  sections:
    n  Span     Root_Chord  Tip_Chord  Area     Sweep  Sweep_Location  Dihedral  Twist  Twist_Location  tip airfoil
    1  8.08333  0.4273      0.4273     3.45401  0      0               -14.3478  0      0.25            as above

Blank "Origin"
  location (X Y Z) 0 0 0, rotation 0 0 0

Fuselage "FuselageGeom"
  location (X Y Z) -1.30435 0 0, rotation 0 0 0
  bounding box size 25 4.44284 4.87889
  Design: Length=25
  cross sections:
    n   XLocPercent  YLocPercent  ZLocPercent  shape
    0   0            0            0            point
    1   0.0516304    0            0            circle Circle_Diameter=1
    2   0.0516304    0            0            as above
    3   0.0768414    0            -0.0108696   general fuselage BotStr=0.657136 BotTanAngle=90 CornerRad=0 Height=2.23809 LowStr=0.83 MaxWidthLoc=0.363636 TopStr=0.840136 TopTanAngle=90 UpStr=0.83 Width=3.09125
    4   0.163128     0            -0.0108696   general fuselage BotStr=0.83 BotTanAngle=90 CornerRad=0 Height=3.26407 LowStr=1.50559 MaxWidthLoc=0 TopStr=0.83 TopTanAngle=90 UpStr=1.59709 Width=3.74945
    5   0.25226      0            0.0161862    general fuselage BotStr=1.43905 BotTanAngle=90 CornerRad=0 Height=4.53507 LowStr=1.49727 MaxWidthLoc=0.409091 TopStr=1.73018 TopTanAngle=90 UpStr=0.981545 Width=4.05217
    6   0.374862     0            0.0188747    general fuselage BotStr=1.43905 BotTanAngle=90 CornerRad=0 Height=4.48354 LowStr=1.49727 MaxWidthLoc=0.409091 TopStr=1.73018 TopTanAngle=90 UpStr=0.989864 Width=4.06618
    7   0.556373     0            0.0195       general fuselage BotStr=0.756955 BotTanAngle=90 CornerRad=0 Height=2.85216 LowStr=1.48064 MaxWidthLoc=-0.1 TopStr=0.83 TopTanAngle=90 UpStr=1.61373 Width=3.37952
    8   0.75         0            0.0375735    general fuselage BotStr=0.83 BotTanAngle=90 CornerRad=0 Height=1.91629 LowStr=1.59709 MaxWidthLoc=0.145455 TopStr=1.32259 TopTanAngle=90 UpStr=1.38914 Width=2.08134
    9   0.961957     0            0.0585536    general fuselage BotStr=0.83 BotTanAngle=90 CornerRad=0 Height=1.0767 LowStr=1.66364 MaxWidthLoc=0 TopStr=0.748636 TopTanAngle=90 UpStr=1.63868 Width=0.441886
    10  1            0            0.0694707    point

Fuselage "FuselageGeom"
  location (X Y Z) 1.46827 0 -3.20858, rotation 0 0 0
  bounding box size 2.77355 0.8 1.1448
  Design: Length=2.73994
  cross sections:
    n  XLocPercent  YLocPercent  ZLocPercent  shape
    0  0            0            0            point
    1  0.364865     0            0            ellipse Ellipse_Height=1.1448 Ellipse_Width=0.8
    2  0.711614     0            0            ellipse Ellipse_Height=0.942103 Ellipse_Width=0.8
    3  1            0            0            point

Fuselage "FuselageGeom"
  location (X Y Z) 6.69095 4.51351 -2.66627, rotation 0 -5.32609 0
  symmetric about XZ
  bounding box size 3.12002 9.82703 1.54914
  Design: Length=3.09475
  cross sections:
    n  XLocPercent  YLocPercent  ZLocPercent  shape
    0  0            0            0            point
    1  0.344595     0            0            ellipse Ellipse_Height=1.5 Ellipse_Width=0.8
    2  0.628013     0            0.027027     ellipse Ellipse_Height=1.1448 Ellipse_Width=0.8
    3  1            0            0.0273       point

Wing "Struts"
  location (X Y Z) 7.93478 1.31522 -1.40541, rotation 55.2826 0.108696 0
  symmetric about XZ
  bounding box size 0.433749 9.29141 1.32419
  totals: TotalSpan=7 TotalProjectedSpan=1.68314 TotalChord=0.4273 TotalArea=2.9911 TotalAR=0.947133
  root: chord 0.4273, twist 0, NACA 4-series Camber=0 CamberLoc=0.2 ThickChord=0.333
  sections:
    n  Span  Root_Chord  Tip_Chord  Area     Sweep  Sweep_Location  Dihedral  Twist  Twist_Location  tip airfoil
    1  3.5   0.4273      0.4273     1.49555  0      0               -76.087   0      0.25            as above

Pod "origin"
  location (X Y Z) 0 0 0, rotation 0 0 0
  bounding box size 1 0.133333 0.133333
  Design: FineRatio=15 Length=1

Wing "Struts"
  location (X Y Z) 2.28261 0 -3.03584, rotation 166.196 -9.8913 0
  bounding box size 1.00535 0.0546694 3.59739
  totals: TotalSpan=3.5 TotalProjectedSpan=0.841572 TotalChord=0.4273 TotalArea=1.49555 TotalAR=0.473567
  root: chord 0.4273, twist 0, NACA 4-series Camber=0 CamberLoc=0.2 ThickChord=0.333
  sections:
    n  Span  Root_Chord  Tip_Chord  Area     Sweep  Sweep_Location  Dihedral  Twist  Twist_Location  tip airfoil
    1  3.5   0.4273      0.4273     1.49555  0      0               -76.087   0      0.25            as above
